// SBML level 2 version 4

model model_SPR()

  // Compartments:
  compartment unnamed = 1;

  // Species:
  species $e in unnamed = 0;
  species $r in unnamed;
  species er in unnamed = 0;
  species $o in unnamed = 0;
  species eo in unnamed = 0;
  species OR in unnamed = 0;
  species $rp in unnamed = 0;
  species erp in unnamed = 0;
  species orp in unnamed = 0;
  species $ep in unnamed = 0;
  species epo in unnamed = 0;
  species epr in unnamed = 0;
  species eprp in unnamed = 0;
  species eo_or in unnamed = 0;
  species eo_er in unnamed = 0;
  species er_or in unnamed = 0;
  species eo_orp in unnamed = 0;
  species eo_erp in unnamed = 0;
  species erp_orp in unnamed = 0;
  species epo_or in unnamed = 0;
  species epo_epr in unnamed = 0;
  species epr_or in unnamed = 0;
  species epo_orp in unnamed = 0;
  species epo_eprp in unnamed = 0;
  species eprp_orp in unnamed = 0;
  species eo_er_or in unnamed = 0;
  species eo_erp_orp in unnamed = 0;
  species epo_epr_or in unnamed = 0;
  species epo_eprp_orp in unnamed = 0;
  species otot in unnamed;
  species rtot in unnamed = 0;
  species etot in unnamed;
  species rptot in unnamed;
  species eptot in unnamed;
  species rcomp in unnamed;

  // Parameters:
  kerf = 1;
  kerf_factor = 1;
  korf = 1;
  korf_factor = 1;
  keof = 1;
  keof_factor = 1;
  KDeo = 20;
  KDer = 0.1;
  KDor = 0.005;
  KDorp = 0.005;
  KDepo = 0.2;
  a = 1;
  d = 1;
  e_weight = 6.3;
  o_weight = 1;
  KDerp_factor = 5;

  // Assignment rules:
  keor := KDeo*keof;
  keord := KDeo*keof*d;
  KDerp := KDer*KDerp_factor;
  kerr := KDer*kerf;
  kerrd := KDer*kerf*d;
  kerpr := KDerp*kerf;
  kerprd := KDerp*kerf*d;
  korr := KDor*korf;
  korrd := KDor*korf*d;
  korpr := KDorp*korf;
  korprd := KDorp*korf*d;
  kepor := KDepo*keof;
  kepord := KDepo*keof*d;
  otot := o + eo + epo + OR + orp + eo_or + epo_or + epo_orp + eo_orp + eo_er + epo_epr + eo_erp + epo_eprp + er_or + epr_or + erp_orp + eprp_orp + eo_er_or + eo_erp_orp + epo_epr_or + epo_eprp_orp;
  r := rtot - (rp + erp + eprp + er + epr + OR + orp + eo_or + epo_or + epo_orp + eo_orp + eo_er + epo_epr + eo_erp + epo_eprp + er_or + epr_or + erp_orp + eprp_orp + eo_er_or + eo_erp_orp + epo_epr_or + epo_eprp_orp);
  rcomp := e_weight*(epr + er) + o_weight*OR + (o_weight + e_weight)*(epo_or + eo_or + epo_epr + eo_er + epr_or + er_or + epo_epr_or + eo_er_or);
  rptot := rp + erp + eprp + orp + epo_orp + eo_orp + eo_erp + epo_eprp + erp_orp + eprp_orp + eo_erp_orp + epo_eprp_orp;
  eptot := ep + eprp + epr + epo + epo_or + epo_orp + epo_epr + epo_eprp + epr_or + eprp_orp + epo_epr_or + epo_eprp_orp;
  etot := e + ep + erp + eprp + er + epr + eo + epo + eo_or + epo_or + epo_orp + eo_orp + eo_er + epo_epr + eo_erp + epo_eprp + er_or + epr_or + erp_orp + eprp_orp + eo_er_or + eo_erp_orp + epo_epr_or + epo_eprp_orp;
  keofp := a*keof;
  korfp := a*korf;
  kerfp := a*kerf;

  // Reactions:
  ver: $e + $r -> er; kerf_factor*kerf*e*r - kerr*er;
  veo: $e + $o -> eo; keof_factor*keof*e*o - keor*eo;
  vor: $r + $o -> OR; korf_factor*korf*r*o - korr*OR;
  verp: $e + $rp -> erp; kerf_factor*kerf*e*rp - kerpr*erp;
  vorp: $o + $rp -> orp; korf_factor*korf*o*rp - korpr*orp;
  vepo: $ep + $o -> epo; keof_factor*keof*ep*o - kepor*epo;
  vepr: $ep + $r -> epr; kerf_factor*kerf*ep*r - kerr*epr;
  veprp: $rp + $ep -> eprp; kerf_factor*kerf*rp*ep - kerpr*eprp;
  veo_or_or: OR + $e -> eo_or; keof_factor*keof*OR*e - keor*eo_or;
  veo_or_eo: eo + $r -> eo_or; korf_factor*korf*eo*r - korr*eo_or;
  veo_er_eo: eo + $r -> eo_er; kerf_factor*kerf*eo*r - kerr*eo_er;
  veo_er_er: er + $o -> eo_er; keof_factor*keof*er*o - keor*eo_er;
  ver_or_or: OR + $e -> er_or; kerf_factor*kerf*OR*e - kerr*er_or;
  ver_or_er: er + $o -> er_or; korf_factor*korf*er*o - korr*er_or;
  veo_orp_orp: orp + $e -> eo_orp; keof_factor*keof*orp*e - keor*eo_orp;
  veo_orp_eo: eo + $rp -> eo_orp; korf_factor*korf*eo*rp - korpr*eo_orp;
  veo_erp_eo: eo + $rp -> eo_erp; kerf_factor*kerf*eo*rp - kerpr*eo_erp;
  veo_erp_erp: erp + $o -> eo_erp; keof_factor*keof*erp*o - keor*eo_erp;
  verp_orp_orp: orp + $e -> erp_orp; kerf_factor*kerf*orp*e - kerpr*erp_orp;
  verp_orp_erp: erp + $o -> erp_orp; korf_factor*korf*erp*o - korpr*erp_orp;
  vepo_or_or: OR + $ep -> epo_or; keof_factor*keof*OR*ep - kepor*epo_or;
  vepo_or_epo: epo + $r -> epo_or; korf_factor*korf*epo*r - korr*epo_or;
  epo_epr_epr: epr + $o -> epo_epr; keof_factor*keof*epr*o - kepor*epo_epr;
  vepo_epr_epo: epo + $r -> epo_epr; kerf_factor*kerf*epo*r - kerr*epo_epr;
  vepr_or_or: OR + $ep -> epr_or; kerf_factor*kerf*OR*ep - kerr*epr_or;
  vepr_or_epr: epr + $o -> epr_or; korf_factor*korf*epr*o - korr*epr_or;
  vepo_orp_orp: orp + $ep -> epo_orp; keof_factor*keof*orp*ep - kepor*epo_orp;
  vepo_orp_epo: epo + $rp -> epo_orp; korf_factor*korf*epo*rp - korpr*epo_orp;
  vepo_eprp_epo: $rp + epo -> epo_eprp; kerf_factor*kerf*rp*epo - kerpr*epo_eprp;
  vepo_eprp_eprp: eprp + $o -> epo_eprp; keof_factor*keof*eprp*o - kepor*epo_eprp;
  veprp_orp_orp: orp + $ep -> eprp_orp; kerf_factor*kerf*orp*ep - kerpr*eprp_orp;
  veprp_orp_eprp: eprp + $o -> eprp_orp; korf_factor*korf*eprp*o - korpr*eprp_orp;
  veo_er_or_eror: er_or -> eo_er_or; keofp*er_or - keord*eo_er_or;
  veo_er_or_eoer: eo_er -> eo_er_or; korfp*eo_er - korrd*eo_er_or;
  veo_er_or_eoor: eo_or -> eo_er_or; kerfp*eo_or - kerrd*eo_er_or;
  veo_ero_orp_eoorp: eo_orp -> eo_erp_orp; kerfp*eo_orp - kerprd*eo_erp_orp;
  veo_erp_orp_eoerp: eo_erp -> eo_erp_orp; korfp*eo_erp - korprd*eo_erp_orp;
  veo_erp_orp_erporp: erp_orp -> eo_erp_orp; keofp*erp_orp - keord*eo_erp_orp;
  vepo_epr_or_epoor: epo_or -> epo_epr_or; kerfp*epo_or - kerrd*epo_epr_or;
  vepo_epr_or_epoepr: epo_epr -> epo_epr_or; korfp*epo_epr - korrd*epo_epr_or;
  vepo_epr_or_epror: epr_or -> epo_epr_or; keofp*epr_or - kepord*epo_epr_or;
  vepo_eprp_orp_epoorp: epo_orp -> epo_eprp_orp; kerfp*epo_orp - kerprd*epo_eprp_orp;
  vepo_eprp_orp_epoeprp: epo_eprp -> epo_eprp_orp; korfp*epo_eprp - korprd*epo_eprp_orp;
  vepo_eprp_orp_eprporp: eprp_orp -> epo_eprp_orp; keofp*eprp_orp - kepord*epo_eprp_orp;
end
