// SBML level 2 version 4

model model_invitro_incell()

  // Compartments:
  compartment unnamed = 1;

  // Species:
  species $e in unnamed;
  species $r in unnamed;
  species $o in unnamed;
  species er in unnamed = 0;
  species eo in unnamed = 0;
  species OR in unnamed = 0;
  species rp in unnamed = 0;
  species erp in unnamed = 0;
  species orp in unnamed = 0;
  species ep in unnamed = 0;
  species epo in unnamed = 0;
  species epr in unnamed = 0;
  species eprp in unnamed = 0;
  species eo_or in unnamed = 0;
  species eo_er in unnamed = 0;
  species er_or in unnamed = 0;
  species eo_orp in unnamed = 0;
  species eo_erp in unnamed = 0;
  species erp_orp in unnamed = 0;
  species epo_or in unnamed = 0;
  species epo_epr in unnamed = 0;
  species epr_or in unnamed = 0;
  species epo_orp in unnamed = 0;
  species epo_eprp in unnamed = 0;
  species eprp_orp in unnamed = 0;
  species eo_er_or in unnamed = 0;
  species eo_erp_orp in unnamed = 0;
  species epo_epr_or in unnamed = 0;
  species epo_eprp_orp in unnamed = 0;
  species $kin in unnamed;
  species kin_inact in unnamed = 0;
  species ekin in unnamed = 0;
  species ekin_inact in unnamed = 0;
  species epkin in unnamed = 0;
  species epkin_inact in unnamed = 0;
  species epPP in unnamed = 0;
  species ePP in unnamed = 0;
  species $PP in unnamed;
  species $PP2 in unnamed;
  species rpPP2 in unnamed = 0;
  species PP2tot in unnamed = 1/unnamed;
  species PPtot in unnamed = 1/unnamed;
  species kintot in unnamed = 1/unnamed;
  species otot in unnamed = 1/unnamed;
  species rtot in unnamed = 2/unnamed;
  species etot in unnamed = 0.7/unnamed;
  species rptot in unnamed;
  species eptot in unnamed;
  species rPP2 in unnamed = 0;
  species erPP2 in unnamed = 0;
  species eprPP2 in unnamed = 0;
  species eo_erPP2 in unnamed = 0;
  species epo_eprPP2 in unnamed = 0;
  species erpPP2 in unnamed = 0;
  species eprpPP2 in unnamed = 0;
  species eo_erpPP2 in unnamed = 0;
  species epo_eprpPP2 in unnamed = 0;
  species epo_er in unnamed = 0;
  species eoPP in unnamed = 0;
  species epoPP in unnamed = 0;
  species eo_orPP in unnamed = 0;
  species epo_orPP in unnamed = 0;
  species eo_orpPP in unnamed = 0;
  species epo_orpPP in unnamed = 0;
  species eokin in unnamed = 0;
  species epokin in unnamed = 0;
  species eo_orkin in unnamed = 0;
  species epo_orkin in unnamed = 0;
  species eo_orpkin in unnamed = 0;
  species epo_orpkin in unnamed = 0;
  species eokin_inact in unnamed = 0;
  species epokin_inact in unnamed = 0;
  species eo_orkin_inact in unnamed = 0;
  species epo_orkin_inact in unnamed = 0;
  species eo_orpkin_inact in unnamed = 0;
  species epo_orpkin_inact in unnamed = 0;
  species ep_FSUB in unnamed;
  species rp_VFSUB in unnamed;

  // Parameters:
  kerf = 1;
  kerf_factor = 1;
  korf = 1;
  korf_factor = 1;
  keof = 1;
  keof_factor = 1;
  KDer = 1;
  KDor = 1;
  KDorp = 1;
  KDepo = 1;
  KDkin = 1;
  KDpp = 1;
  KDpp2 = 1;
  ep_factor = 100;
  kcatrp = 1;
  kcatrp_on = 1;
  kkinb = 1;
  kcatkin = 1;
  kcatkin_on = 1;
  kppb = 1;
  kcatpp = 1;
  kcatpp_on = 1;
  kpp2b = 1;
  kcatpp2 = 1;
  kkin_act_bg = 1;
  kkin_act_egf = 1;
  kkin_act_on = 1;
  kkin_inact = 1;
  a = 1;
  d = 1;
  rtot_factor = 1;
  otot_factor = 1;
  KDerp_factor = 5;

  // Assignment rules:
  KDeo := KDepo*ep_factor;
  keor := KDeo*keof;
  keord := KDeo*keof*d;
  KDerp := KDer*KDerp_factor;
  kerr := KDer*kerf;
  kerrd := KDer*kerf*d;
  kerpr := KDerp*kerf;
  kerprd := KDerp*kerf*d;
  korr := KDor*korf;
  korrd := KDor*korf*d;
  korpr := KDorp*korf;
  korprd := KDorp*korf*d;
  kepor := KDepo*keof;
  kepord := KDepo*keof*d;
  kkinu := KDkin*kkinb;
  kppu := KDpp*kppb;
  kpp2u := KDpp2*kpp2b;
  PP := PPtot - (ePP + epPP + eo_orPP + eoPP + epoPP + epo_orpPP + eo_orpPP + epo_orPP);
  PP2 := PP2tot - (rpPP2 + eprPP2 + eo_erPP2 + epo_eprpPP2 + erpPP2 + rPP2 + eo_erpPP2 + erPP2 + eprpPP2 + epo_eprPP2);
  kin := kintot - (ekin + epkin + kin_inact + ekin_inact + epkin_inact + eokin_inact + eo_orpkin_inact + eo_orkin + epokin + eokin + epo_orpkin + epo_orkin_inact + epo_orkin + eo_orkin_inact + eo_orpkin + epo_orpkin_inact + epokin_inact);
  o := otot*otot_factor - (eo + epo + OR + orp + eo_or + epo_or + epo_orp + eo_orp + eo_er + epo_epr + eo_erp + epo_eprp + er_or + epr_or + erp_orp + eprp_orp + eo_er_or + eo_erp_orp + epo_epr_or + epo_eprp_orp + eo_erPP2 + epo_eprpPP2 + eo_erpPP2 + epo_eprPP2 + eo_orPP + eoPP + epoPP + epo_orpPP + eo_orpPP + epo_orPP + eokin_inact + eo_orpkin_inact + eo_orkin + epokin + eokin + epo_orpkin + epo_orkin_inact + epo_orkin + eo_orkin_inact + eo_orpkin + epo_orpkin_inact + epokin_inact);
  r := rtot*rtot_factor - (rp + erp + eprp + er + epr + OR + orp + eo_or + epo_or + epo_orp + eo_orp + eo_er + epo_epr + eo_erp + epo_eprp + er_or + epr_or + erp_orp + eprp_orp + eo_er_or + eo_erp_orp + epo_epr_or + epo_eprp_orp + rpPP2 + eprPP2 + eo_erPP2 + epo_eprpPP2 + erpPP2 + rPP2 + eo_erpPP2 + erPP2 + eprpPP2 + epo_eprPP2 + eo_orPP + epo_orpPP + eo_orpPP + epo_orPP + eo_orpkin_inact + eo_orkin + epo_orpkin + epo_orkin_inact + epo_orkin + eo_orkin_inact + eo_orpkin + epo_orpkin_inact);
  rptot := rp + erp + eprp + orp + epo_orp + eo_orp + eo_erp + epo_eprp + erp_orp + eprp_orp + eo_erp_orp + epo_eprp_orp + rpPP2 + epo_eprpPP2 + erpPP2 + eo_erpPP2 + eprpPP2 + epo_orpPP + eo_orpPP + eo_orpkin_inact + epo_orpkin + eo_orpkin + epo_orpkin_inact;
  eptot := ep + eprp + epr + epo + epo_or + epo_orp + epo_epr + epo_eprp + epr_or + eprp_orp + epo_epr_or + epo_eprp_orp + epPP + epkin + epkin_inact + eprPP2 + epo_eprpPP2 + eprpPP2 + epo_eprPP2 + epoPP + epo_orpPP + epo_orPP + epokin + epo_orpkin + epo_orkin_inact + epo_orkin + epo_orpkin_inact + epokin_inact;
  e := etot - (ep + erp + eprp + er + epr + eo + epo + eo_or + epo_or + epo_orp + eo_orp + eo_er + epo_epr + eo_erp + epo_eprp + er_or + epr_or + erp_orp + eprp_orp + eo_er_or + eo_erp_orp + epo_epr_or + epo_eprp_orp + ekin + epkin + epPP + ePP + ekin_inact + epkin_inact + eprPP2 + eo_erPP2 + epo_eprpPP2 + erpPP2 + eo_erpPP2 + erPP2 + eprpPP2 + epo_eprPP2 + eo_orPP + eoPP + epoPP + epo_orpPP + eo_orpPP + epo_orPP + eokin_inact + eo_orpkin_inact + eo_orkin + epokin + eokin + epo_orpkin + epo_orkin_inact + epo_orkin + eo_orkin_inact + eo_orpkin + epo_orpkin_inact + epokin_inact);
  keofp := a*keof;
  korfp := a*korf;
  kerfp := a*kerf;
  ep_FSUB := ep + epr + epr_or + eprp_orp;
  rp_VFSUB := rp + erp + eprp + eo_erp + epo_eprp;

  // Reactions:
  ver: $e + $r -> er; kerf_factor*kerf*e*r - kerr*er;
  verp: $e + rp -> erp; kerf_factor*kerf*e*rp - kerpr*erp;
  vepr: ep + $r -> epr; kerf_factor*kerf*ep*r - kerr*epr;
  veprp: ep + rp -> eprp; kerf_factor*kerf*ep*rp - kerpr*eprp;
  veo_er_eo: eo + $r -> eo_er; kerf_factor*kerf*eo*r - kerr*eo_er;
  ver_or_or: $e + OR -> er_or; kerf_factor*kerf*e*OR - kerr*er_or;
  veo_erp_eo: eo + rp -> eo_erp; kerf_factor*kerf*eo*rp - kerpr*eo_erp;
  verp_orp_orp: $e + orp -> erp_orp; kerf_factor*kerf*e*orp - kerpr*erp_orp;
  vepo_epr_epo: epo + $r -> epo_epr; kerf_factor*kerf*epo*r - kerr*epo_epr;
  vepr_or_or: ep + OR -> epr_or; kerf_factor*kerf*ep*OR - kerr*epr_or;
  veprp_orp_orp: ep + orp -> eprp_orp; kerf_factor*kerf*ep*orp - kerpr*eprp_orp;
  vepo_eprp_epo: epo + rp -> epo_eprp; kerf_factor*kerf*epo*rp - kerpr*epo_eprp;
  veo_er_or_eoor: eo_or -> eo_er_or; kerf_factor*kerfp*eo_or - kerrd*eo_er_or;
  veo_ero_orp_eoorp: eo_orp -> eo_erp_orp; kerf_factor*kerfp*eo_orp - kerprd*eo_erp_orp;
  vepo_epr_or_epoor: epo_or -> epo_epr_or; kerf_factor*kerfp*epo_or - kerrd*epo_epr_or;
  vepo_eprp_orp_epoorp: epo_orp -> epo_eprp_orp; kerf_factor*kerfp*epo_orp - kerprd*epo_eprp_orp;
  veo: $e + $o -> eo; keof_factor*keof*e*o - keor*eo;
  vepo: ep + $o -> epo; keof_factor*keof*ep*o - kepor*epo;
  veo_or_or: $e + OR -> eo_or; keof_factor*keof*e*OR - keor*eo_or;
  veo_er_er: er + $o -> eo_er; keof_factor*keof*er*o - keor*eo_er;
  veo_orp_orp: $e + orp -> eo_orp; keof_factor*keof*e*orp - keor*eo_orp;
  vepo_or_or: ep + OR -> epo_or; keof_factor*keof*ep*OR - kepor*epo_or;
  veo_erp_erp: erp + $o -> eo_erp; keof_factor*keof*erp*o - keor*eo_erp;
  epo_epr_epr: epr + $o -> epo_epr; keof_factor*keof*epr*o - kepor*epo_epr;
  vepo_orp_orp: ep + orp -> epo_orp; keof_factor*keof*ep*orp - kepor*epo_orp;
  vepo_eprp_eprp: eprp + $o -> epo_eprp; keof_factor*keof*eprp*o - kepor*epo_eprp;
  veo_er_or_eror: er_or -> eo_er_or; keofp*er_or - keord*eo_er_or;
  veo_erp_orp_erporp: erp_orp -> eo_erp_orp; keofp*erp_orp - keord*eo_erp_orp;
  vepo_epr_or_epror: epr_or -> epo_epr_or; keofp*epr_or - kepord*epo_epr_or;
  vepo_eprp_orp_eprporp: eprp_orp -> epo_eprp_orp; keofp*eprp_orp - kepord*epo_eprp_orp;
  vor: $o + $r -> OR; korf_factor*korf*o*r - korr*OR;
  vorp: $o + rp -> orp; korf_factor*korf*o*rp - korpr*orp;
  veo_or_eo: eo + $r -> eo_or; korf_factor*korf*eo*r - korr*eo_or;
  ver_or_er: $o + er -> er_or; korf_factor*korf*o*er - korr*er_or;
  veo_orp_eo: eo + rp -> eo_orp; korf_factor*korf*eo*rp - korpr*eo_orp;
  verp_orp_erp: $o + erp -> erp_orp; korf_factor*korf*o*erp - korpr*erp_orp;
  vepo_or_epo: epo + $r -> epo_or; korf_factor*korf*epo*r - korr*epo_or;
  vepr_or_epr: $o + epr -> epr_or; korf_factor*korf*o*epr - korr*epr_or;
  vepo_orp_epo: epo + rp -> epo_orp; korf_factor*korf*epo*rp - korpr*epo_orp;
  veprp_orp_eprp: $o + eprp -> eprp_orp; korf_factor*korf*o*eprp - korpr*eprp_orp;
  veo_er_or_eoer: eo_er -> eo_er_or; korf_factor*korfp*eo_er - korrd*eo_er_or;
  veo_erp_orp_eoerp: eo_erp -> eo_erp_orp; korf_factor*korfp*eo_erp - korprd*eo_erp_orp;
  vepo_epr_or_epoepr: epo_epr -> epo_epr_or; korf_factor*korfp*epo_epr - korrd*epo_epr_or;
  vepo_eprp_orp_epoeprp: epo_eprp -> epo_eprp_orp; korf_factor*korfp*epo_eprp - korprd*epo_eprp_orp;
  veprp_orp_epror: epr_or => orp + ep; kcatrp_on*kcatrp*epr_or;
  veprp_epr: epr => rp + ep; kcatrp_on*kcatrp*epr;
  vekin_inact: $e + kin_inact -> ekin_inact; kkinb*e*kin_inact - kkinu*ekin_inact;
  vepkin_inact: ep + kin_inact -> epkin_inact; kkinb*ep*kin_inact - kkinu*epkin_inact;
  vkin_act: kin_inact -> $kin; (kkin_act_bg + kkin_act_egf*kkin_act_on)*kin_inact - kkin_inact*kin;
  vekin: $e + $kin -> ekin; kkinb*e*kin - kkinu*ekin;
  vepkin: ep + $kin -> epkin; kkinb*ep*kin - kkinu*epkin;
  vep_ekin: ekin => ep + $kin; kcatkin_on*kcatkin*ekin;
  vepp: $e + $PP -> ePP; kppb*e*PP - kppu*ePP;
  veppp: ep + $PP -> epPP; kppb*ep*PP - kppu*epPP;
  ve_eppp: epPP => $e + $PP; kcatpp_on*kcatpp*epPP;
  vrpPP2: rp + $PP2 -> rpPP2; kpp2b*rp*PP2 - kpp2u*rpPP2;
  vr_rpPP2: rpPP2 => $r + $PP2; kcatpp2*rpPP2;
  vr_PP2: $r + $PP2 -> rPP2; kpp2b*r*PP2 - kpp2u*rPP2;
  ver_PP2: er + $PP2 -> erPP2; kpp2b*er*PP2 - kpp2u*erPP2;
  ve_rPP2: $e + rPP2 -> erPP2; kerf*e*rPP2 - kerr*erPP2;
  vepr_PP2: epr + $PP2 -> eprPP2; kpp2b*epr*PP2 - kpp2u*eprPP2;
  vep_rPP2: ep + rPP2 -> eprPP2; kerf*ep*rPP2 - kerr*eprPP2;
  veo_er_PP2: eo_er + $PP2 -> eo_erPP2; kpp2b*eo_er*PP2 - kpp2u*eo_erPP2;
  veo_rPP2: eo + rPP2 -> eo_erPP2; kerf*eo*rPP2 - kerr*eo_erPP2;
  verPP2_o: erPP2 + $o -> eo_erPP2; keof*erPP2*o - keor*eo_erPP2;
  vepo_epr_PP2: epo_epr + $PP2 -> epo_eprPP2; kpp2b*epo_epr*PP2 - kpp2u*epo_eprPP2;
  vepo_rPP2: epo + rPP2 -> epo_eprPP2; kerf*epo*rPP2 - kerr*epo_eprPP2;
  veprPP2_o: eprPP2 + $o -> epo_eprPP2; keof*eprPP2*o - kepor*epo_eprPP2;
  verp_PP2: erp + $PP2 -> erpPP2; kpp2b*erp*PP2 - kpp2u*erpPP2;
  ve_rpPP2: $e + rpPP2 -> erpPP2; kerf*e*rpPP2 - kerpr*erpPP2;
  veprp_PP2: eprp + $PP2 -> eprpPP2; kpp2b*eprp*PP2 - kpp2u*eprpPP2;
  vep_rpPP2: ep + rpPP2 -> eprpPP2; kerf*ep*rpPP2 - kerpr*eprpPP2;
  veo_erp_PP2: eo_erp + $PP2 -> eo_erpPP2; kpp2b*eo_erp*PP2 - kpp2u*eo_erpPP2;
  veo_rpPP2: eo + rpPP2 -> eo_erpPP2; kerf*eo*rpPP2 - kerpr*eo_erpPP2;
  verpPP2_o: erpPP2 + $o -> eo_erpPP2; keof*erpPP2*o - keor*eo_erpPP2;
  vepo_eprp_PP2: epo_eprp + $PP2 -> epo_eprpPP2; kpp2b*epo_eprp*PP2 - kpp2u*epo_eprpPP2;
  vepo_rpPP2: epo + rpPP2 -> epo_eprpPP2; kerf*epo*rpPP2 - kerpr*epo_eprpPP2;
  veprpPP2_o: eprpPP2 + $o -> epo_eprpPP2; keof*eprpPP2*o - kepor*epo_eprpPP2;
  ver_PP2_cat: erpPP2 -> er + $PP2; kcatpp2*erpPP2;
  vepr_PP2_cat: eprpPP2 -> epr + $PP2; kcatpp2*eprpPP2;
  veo_er_PP2_cat: eo_erpPP2 -> eo_er + $PP2; kcatpp2*eo_erpPP2;
  vepo_er_PP2_cat: epo_eprpPP2 -> epo_er + $PP2; kcatpp2*epo_eprpPP2;
  veo_PP: eo + $PP -> eoPP; kppb*eo*PP - kppu*eoPP;
  vePP_o: ePP + $o -> eoPP; keof*ePP*o - keor*eoPP;
  vepo_PP: epo + $PP -> epoPP; kppb*epo*PP - kppu*epoPP;
  vepPP_o: epPP + $o -> epoPP; keof*epPP*o - kepor*epoPP;
  veo_or_PP: eo_or + $PP -> eo_orPP; kppb*eo_or*PP - kppu*eo_orPP;
  vePP_OR: ePP + OR -> eo_orPP; keof*ePP*OR - keor*eo_orPP;
  veoPP_r: eoPP + $r -> eo_orPP; korf*eoPP*r - korr*eo_orPP;
  vepo_or_PP: epo_or + $PP -> epo_orPP; kppb*epo_or*PP - kppu*epo_orPP;
  vepPP_OR: epPP + OR -> epo_orPP; keof*epPP*OR - kepor*epo_orPP;
  vepoPP_r: epoPP + $r -> epo_orPP; korf*epoPP*r - korr*epo_orPP;
  veo_orp_PP: eo_orp + $PP -> eo_orpPP; kppb*eo_orp*PP - kppu*eo_orpPP;
  vePP_orp: ePP + orp -> eo_orpPP; keof*ePP*orp - keor*eo_orpPP;
  veoPP_rp: eoPP + rp -> eo_orpPP; korf*eoPP*rp - korpr*eo_orpPP;
  vepo_orp_PP: epo_orp + $PP -> epo_orpPP; kppb*epo_orp*PP - kppu*epo_orpPP;
  vepPP_orp: epPP + orp -> epo_orpPP; keof*epPP*orp - kepor*epo_orpPP;
  vepoPP_rp: epoPP + rp -> epo_orpPP; korf*epoPP*rp - korpr*epo_orpPP;
  veo_kin: eo + $kin -> eokin; kkinb*eo*kin - kkinu*eokin;
  vekin_o: ekin + $o -> eokin; keof*ekin*o - keor*eokin;
  vepo_kin: epo + $kin -> epokin; kkinb*epo*kin - kkinu*epokin;
  vepkin_o: epkin + $o -> epokin; keof*epkin*o - kepor*epokin;
  veo_or_kin: eo_or + $kin -> eo_orkin; kkinb*eo_or*kin - kkinu*eo_orkin;
  vekin_OR: ekin + OR -> eo_orkin; keof*ekin*OR - keor*eo_orkin;
  veokin_r: eokin + $r -> eo_orkin; korf*eokin*r - korr*eo_orkin;
  vepo_or_kin: epo_or + $kin -> epo_orkin; kkinb*epo_or*kin - kkinu*epo_orkin;
  vepkin_OR: epkin + OR -> epo_orkin; keof*epkin*OR - kepor*epo_orkin;
  vepokin_r: epokin + $r -> epo_orkin; korf*epokin*r - korr*epo_orkin;
  veo_orp_kin: eo_orp + $kin -> eo_orpkin; kkinb*eo_orp*kin - kkinu*eo_orpkin;
  vekin_orp: ekin + orp -> eo_orpkin; keof*ekin*orp - keor*eo_orpkin;
  veokin_rp: eokin + rp -> eo_orpkin; korf*eokin*rp - korpr*eo_orpkin;
  vepo_orp_kin: epo_orp + $kin -> epo_orpkin; kkinb*epo_orp*kin - kkinu*epo_orpkin;
  vepkin_orp: epkin + orp -> epo_orpkin; keof*epkin*orp - kepor*epo_orpkin;
  vepokin_rp: epokin + rp -> epo_orpkin; korf*epokin*rp - korpr*epo_orpkin;
  veo_kin_inact: eo + kin_inact -> eokin_inact; kkinb*eo*kin_inact - kkinu*eokin_inact;
  vekin_inact_o: ekin_inact + $o -> eokin_inact; keof*ekin_inact*o - keor*eokin_inact;
  vepo_kin_inact: epo + kin_inact -> epokin_inact; kkinb*epo*kin_inact - kkinu*epokin_inact;
  vepkin_inact_o: epkin_inact + $o -> epokin_inact; keof*epkin_inact*o - kepor*epokin_inact;
  veo_or_kin_inact: eo_or + kin_inact -> eo_orkin_inact; kkinb*eo_or*kin_inact - kkinu*eo_orkin_inact;
  vekin_inact_OR: ekin_inact + OR -> eo_orkin_inact; keof*ekin_inact*OR - keor*eo_orkin_inact;
  veokin_inact_r: eokin_inact + $r -> eo_orkin_inact; korf*eokin_inact*r - korr*eo_orkin_inact;
  vepo_or_kin_inact: epo_or + kin_inact -> epo_orkin_inact; kkinb*epo_or*kin_inact - kkinu*epo_orkin_inact;
  vepkin_inact_OR: epkin_inact + OR -> epo_orkin_inact; keof*epkin_inact*OR - kepor*epo_orkin_inact;
  vepokin_inact_r: epokin_inact + $r -> epo_orkin_inact; korf*epokin_inact*r - korr*epo_orkin_inact;
  veo_orp_kin_inact: eo_orp + kin_inact -> eo_orpkin_inact; kkinb*eo_orp*kin_inact - kkinu*eo_orpkin_inact;
  vekin_inact_orp: ekin_inact + orp -> eo_orpkin_inact; keof*ekin_inact*orp - keor*eo_orpkin_inact;
  veokin_inact_rp: eokin_inact + rp -> eo_orpkin_inact; korf*eokin_inact*rp - korpr*eo_orpkin_inact;
  vepo_orp_kin_inact: epo_orp + kin_inact -> epo_orpkin_inact; kkinb*epo_orp*kin_inact - kkinu*epo_orpkin_inact;
  vepkin_inact_orp: epkin_inact + orp -> epo_orpkin_inact; keof*epkin_inact*orp - kepor*epo_orpkin_inact;
  vepokin_inact_rp: epokin_inact + rp -> epo_orpkin_inact; korf*epokin_inact*rp - korpr*epo_orpkin_inact;
end
