// SBML level 2 version 4

model attilar()

  // Compartments:
  compartment unnamed = 1;

  // Species:
  species $e in unnamed;
  species $r in unnamed;
  species $o in unnamed;
  species er in unnamed = 0;
  species eo in unnamed = 0;
  species OR in unnamed = 0;
  species rp in unnamed = 0;
  species erp in unnamed = 0;
  species orp in unnamed = 0;
  species ep in unnamed = 0;
  species epo in unnamed = 0;
  species epr in unnamed = 0;
  species eprp in unnamed = 0;
  species eo_or in unnamed = 0;
  species eo_er in unnamed = 0;
  species er_or in unnamed = 0;
  species eo_orp in unnamed = 0;
  species eo_erp in unnamed = 0;
  species erp_orp in unnamed = 0;
  species epo_or in unnamed = 0;
  species epo_epr in unnamed = 0;
  species epr_or in unnamed = 0;
  species epo_orp in unnamed = 0;
  species epo_eprp in unnamed = 0;
  species eprp_orp in unnamed = 0;
  species eo_er_or in unnamed = 0;
  species eo_erp_orp in unnamed = 0;
  species epo_epr_or in unnamed = 0;
  species epo_eprp_orp in unnamed = 0;
  species $kin in unnamed;
  species kin_inact in unnamed = 0;
  species ekin in unnamed = 0;
  species ekin_inact in unnamed = 0;
  species epkin in unnamed = 0;
  species epkin_inact in unnamed = 0;
  species epPP in unnamed = 0;
  species ePP in unnamed = 0;
  species $PP in unnamed;
  species $PP2 in unnamed;
  species rpPP2 in unnamed = 0;
  species PP2tot in unnamed = 1/unnamed;
  species PPtot in unnamed = 1/unnamed;
  species kintot in unnamed = 1/unnamed;
  species otot in unnamed = 1/unnamed;
  species rtot in unnamed = 2/unnamed;
  species etot in unnamed = 0.7/unnamed;
  species rptot in unnamed;
  species eptot in unnamed;
  species rPP2 in unnamed = 0;
  species erPP2 in unnamed = 0;
  species eprPP2 in unnamed = 0;
  species eo_erPP2 in unnamed = 0;
  species epo_eprPP2 in unnamed = 0;
  species erpPP2 in unnamed = 0;
  species eprpPP2 in unnamed = 0;
  species eo_erpPP2 in unnamed = 0;
  species epo_eprpPP2 in unnamed = 0;
  species epo_er in unnamed = 0;
  species eoPP in unnamed = 0;
  species epoPP in unnamed = 0;
  species eo_orPP in unnamed = 0;
  species epo_orPP in unnamed = 0;
  species eo_orpPP in unnamed = 0;
  species epo_orpPP in unnamed = 0;
  species eokin in unnamed = 0;
  species epokin in unnamed = 0;
  species eo_orkin in unnamed = 0;
  species epo_orkin in unnamed = 0;
  species eo_orpkin in unnamed = 0;
  species epo_orpkin in unnamed = 0;
  species eokin_inact in unnamed = 0;
  species epokin_inact in unnamed = 0;
  species eo_orkin_inact in unnamed = 0;
  species epo_orkin_inact in unnamed = 0;
  species eo_orpkin_inact in unnamed = 0;
  species epo_orpkin_inact in unnamed = 0;
  species rpSUBC in unnamed = 0;
  species erpSUBC in unnamed = 0;
  species eprpSUBC in unnamed = 0;
  species eo_erpSUBC in unnamed = 0;
  species epo_eprpSUBC in unnamed = 0;
  species SUBC in unnamed;
  species pSUBC in unnamed = 0;
  species SUBCtot in unnamed = 0;
  species rpSUBF in unnamed = 0;
  species erpSUBF in unnamed = 0;
  species eprpSUBF in unnamed = 0;
  species eo_erpSUBF in unnamed = 0;
  species orpSUBF in unnamed = 0;
  species erp_orpSUBF in unnamed = 0;
  species eprp_orpSUBF in unnamed = 0;
  species epo_eprpSUBF in unnamed = 0;
  species eo_orpSUBF in unnamed = 0;
  species epo_orpSUBF in unnamed = 0;
  species rpPP2SUBF in unnamed = 0;
  species erpPP2SUBF in unnamed = 0;
  species eprpPP2SUBF in unnamed = 0;
  species eo_erpPP2SUBF in unnamed = 0;
  species epo_eprpPP2SUBF in unnamed = 0;
  species eo_orpPPSUBF in unnamed = 0;
  species epo_orpPPSUBF in unnamed = 0;
  species eo_orpkinSUBF in unnamed = 0;
  species epo_orpkinSUBF in unnamed = 0;
  species eo_orpkin_inactSUBF in unnamed = 0;
  species epo_orpkin_inactSUBF in unnamed = 0;
  species rpSUBCSUBF in unnamed = 0;
  species erpSUBCSUBF in unnamed = 0;
  species eprpSUBCSUBF in unnamed = 0;
  species eo_erpSUBCSUBF in unnamed = 0;
  species epo_eprpSUBCSUBF in unnamed = 0;
  species SUBF in unnamed;
  species pSUBF in unnamed = 0;
  species SUBFtot in unnamed = 0;
  species epo_eprp_orpSUBF in unnamed = 0;
  species eo_erp_orpSUBF in unnamed = 0;

  // Parameters:
  kerf = 1;
  kerf_factor = 1;
  korf = 1;
  korf_factor = 1;
  keof = 1;
  keof_factor = 1;
  KDer = 1;
  KDor = 1;
  KDorp = 1;
  KDepo = 1;
  KDkin = 1;
  KDpp = 1;
  KDpp2 = 1;
  ep_factor = 100;
  kcatrp = 1;
  kcatrp_on = 1;
  kkinb = 1;
  kcatkin = 1;
  kcatkin_on = 1;
  kppb = 1;
  kcatpp = 1;
  kcatpp_on = 1;
  kpp2b = 1;
  kcatpp2 = 1;
  kkin_act_bg = 1;
  kkin_act_egf = 1;
  kkin_act_on = 1;
  kkin_inact = 1;
  a = 1;
  d = 1;
  rtot_factor = 1;
  otot_factor = 1;
  KDerp_factor = 5;
  koff_rpSUB = 1;
  kon_rpSUB = 1;
  kcatSUB = 1;
  kppSUB = 1;

  // Assignment rules:
  KDeo := KDepo*ep_factor;
  keor := KDeo*keof;
  keord := KDeo*keof*d;
  KDerp := KDer*KDerp_factor;
  kerr := KDer*kerf;
  kerrd := KDer*kerf*d;
  kerpr := KDerp*kerf;
  kerprd := KDerp*kerf*d;
  korr := KDor*korf;
  korrd := KDor*korf*d;
  korpr := KDorp*korf;
  korprd := KDorp*korf*d;
  kepor := KDepo*keof;
  kepord := KDepo*keof*d;
  kkinu := KDkin*kkinb;
  kppu := KDpp*kppb;
  kpp2u := KDpp2*kpp2b;
  PP := PPtot - (ePP + epPP + eo_orPP + eoPP + epoPP + epo_orpPP + eo_orpPP + epo_orPP + eo_orpPPSUBF + epo_orpPPSUBF);
  PP2 := PP2tot - (rpPP2 + eprPP2 + eo_erPP2 + epo_eprpPP2 + erpPP2 + rPP2 + eo_erpPP2 + erPP2 + eprpPP2 + epo_eprPP2 + eo_erpPP2SUBF + rpPP2SUBF + epo_eprpPP2SUBF + erpPP2SUBF + eprpPP2SUBF);
  kin := kintot - (ekin + epkin + kin_inact + ekin_inact + epkin_inact + eokin_inact + eo_orpkin_inact + eo_orkin + epokin + eokin + epo_orpkin + epo_orkin_inact + epo_orkin + eo_orkin_inact + eo_orpkin + epo_orpkin_inact + epokin_inact + eo_orpkinSUBF + epo_orpkin_inactSUBF + eo_orpkin_inactSUBF + epo_orpkinSUBF);
  o := otot*otot_factor - (eo + epo + OR + orp + eo_or + epo_or + epo_orp + eo_orp + eo_er + epo_epr + eo_erp + epo_eprp + er_or + epr_or + erp_orp + eprp_orp + eo_er_or + eo_erp_orp + epo_epr_or + epo_eprp_orp + eo_erPP2 + epo_eprpPP2 + eo_erpPP2 + epo_eprPP2 + eo_orPP + eoPP + epoPP + epo_orpPP + eo_orpPP + epo_orPP + eokin_inact + eo_orpkin_inact + eo_orkin + epokin + eokin + epo_orpkin + epo_orkin_inact + epo_orkin + eo_orkin_inact + eo_orpkin + epo_orpkin_inact + epokin_inact + epo_eprpSUBC + eo_erpSUBC + eo_erpPP2SUBF + eo_orpPPSUBF + eo_orpkinSUBF + epo_eprp_orpSUBF + epo_orpPPSUBF + epo_eprpSUBCSUBF + erp_orpSUBF + epo_orpkin_inactSUBF + eo_orpkin_inactSUBF + eo_orpSUBF + epo_eprpPP2SUBF + orpSUBF + epo_orpkinSUBF + eo_erpSUBF + eprp_orpSUBF + epo_orpSUBF + eo_erp_orpSUBF + epo_eprpSUBF + eo_erpSUBCSUBF);
  r := rtot*rtot_factor - (rp + erp + eprp + er + epr + OR + orp + eo_or + epo_or + epo_orp + eo_orp + eo_er + epo_epr + eo_erp + epo_eprp + er_or + epr_or + erp_orp + eprp_orp + eo_er_or + eo_erp_orp + epo_epr_or + epo_eprp_orp + rpPP2 + eprPP2 + eo_erPP2 + epo_eprpPP2 + erpPP2 + rPP2 + eo_erpPP2 + erPP2 + eprpPP2 + epo_eprPP2 + eo_orPP + epo_orpPP + eo_orpPP + epo_orPP + eo_orpkin_inact + eo_orkin + epo_orpkin + epo_orkin_inact + epo_orkin + eo_orkin_inact + eo_orpkin + epo_orpkin_inact + eprpSUBC + erpSUBC + epo_eprpSUBC + rpSUBC + eo_erpSUBC + eprpSUBCSUBF + eo_erpPP2SUBF + eo_orpPPSUBF + eo_orpkinSUBF + epo_eprp_orpSUBF + rpSUBCSUBF + epo_orpPPSUBF + epo_eprpSUBCSUBF + rpSUBF + erp_orpSUBF + rpPP2SUBF + epo_orpkin_inactSUBF + eo_orpkin_inactSUBF + eprpSUBF + eo_orpSUBF + epo_eprpPP2SUBF + erpPP2SUBF + orpSUBF + epo_orpkinSUBF + eo_erpSUBF + eprpPP2SUBF + eprp_orpSUBF + epo_orpSUBF + erpSUBF + eo_erp_orpSUBF + erpSUBCSUBF + epo_eprpSUBF + eo_erpSUBCSUBF);
  rptot := rp + erp + eprp + orp + epo_orp + eo_orp + eo_erp + epo_eprp + erp_orp + eprp_orp + eo_erp_orp + epo_eprp_orp + rpPP2 + epo_eprpPP2 + erpPP2 + eo_erpPP2 + eprpPP2 + epo_orpPP + eo_orpPP + eo_orpkin_inact + epo_orpkin + eo_orpkin + epo_orpkin_inact + eprpSUBC + erpSUBC + epo_eprpSUBC + rpSUBC + eo_erpSUBC + eprpSUBCSUBF + eo_erpPP2SUBF + eo_orpPPSUBF + eo_orpkinSUBF + epo_eprp_orpSUBF + rpSUBCSUBF + epo_orpPPSUBF + epo_eprpSUBCSUBF + rpSUBF + erp_orpSUBF + rpPP2SUBF + epo_orpkin_inactSUBF + eo_orpkin_inactSUBF + eprpSUBF + eo_orpSUBF + epo_eprpPP2SUBF + erpPP2SUBF + orpSUBF + epo_orpkinSUBF + eo_erpSUBF + eprpPP2SUBF + eprp_orpSUBF + epo_orpSUBF + erpSUBF + eo_erp_orpSUBF + erpSUBCSUBF + epo_eprpSUBF + eo_erpSUBCSUBF;
  eptot := ep + eprp + epr + epo + epo_or + epo_orp + epo_epr + epo_eprp + epr_or + eprp_orp + epo_epr_or + epo_eprp_orp + epPP + epkin + epkin_inact + eprPP2 + epo_eprpPP2 + eprpPP2 + epo_eprPP2 + epoPP + epo_orpPP + epo_orPP + epokin + epo_orpkin + epo_orkin_inact + epo_orkin + epo_orpkin_inact + epokin_inact + eprpSUBC + epo_eprpSUBC + eprpSUBCSUBF + epo_eprp_orpSUBF + epo_orpPPSUBF + epo_eprpSUBCSUBF + epo_orpkin_inactSUBF + eprpSUBF + epo_eprpPP2SUBF + epo_orpkinSUBF + eprpPP2SUBF + eprp_orpSUBF + epo_orpSUBF + epo_eprpSUBF;
  e := etot - (ep + erp + eprp + er + epr + eo + epo + eo_or + epo_or + epo_orp + eo_orp + eo_er + epo_epr + eo_erp + epo_eprp + er_or + epr_or + erp_orp + eprp_orp + eo_er_or + eo_erp_orp + epo_epr_or + epo_eprp_orp + ekin + epkin + epPP + ePP + ekin_inact + epkin_inact + eprPP2 + eo_erPP2 + epo_eprpPP2 + erpPP2 + eo_erpPP2 + erPP2 + eprpPP2 + epo_eprPP2 + eo_orPP + eoPP + epoPP + epo_orpPP + eo_orpPP + epo_orPP + eokin_inact + eo_orpkin_inact + eo_orkin + epokin + eokin + epo_orpkin + epo_orkin_inact + epo_orkin + eo_orkin_inact + eo_orpkin + epo_orpkin_inact + epokin_inact + eprpSUBC + erpSUBC + epo_eprpSUBC + eo_erpSUBC + eprpSUBCSUBF + eo_erpPP2SUBF + eo_orpPPSUBF + eo_orpkinSUBF + epo_eprp_orpSUBF + epo_orpPPSUBF + epo_eprpSUBCSUBF + erp_orpSUBF + epo_orpkin_inactSUBF + eo_orpkin_inactSUBF + eprpSUBF + eo_orpSUBF + epo_eprpPP2SUBF + erpPP2SUBF + epo_orpkinSUBF + eo_erpSUBF + eprpPP2SUBF + eprp_orpSUBF + epo_orpSUBF + erpSUBF + eo_erp_orpSUBF + erpSUBCSUBF + epo_eprpSUBF + eo_erpSUBCSUBF);
  keofp := a*keof;
  korfp := a*korf;
  kerfp := a*kerf;
  SUBC := SUBCtot - (pSUBC + eprpSUBC + erpSUBC + epo_eprpSUBC + rpSUBC + eo_erpSUBC);
  SUBF := SUBFtot - (pSUBF + eprpSUBCSUBF + eo_erpPP2SUBF + eo_orpPPSUBF + eo_orpkinSUBF + epo_eprp_orpSUBF + rpSUBCSUBF + epo_orpPPSUBF + epo_eprpSUBCSUBF + rpSUBF + erp_orpSUBF + rpPP2SUBF + epo_orpkin_inactSUBF + eo_orpkin_inactSUBF + eprpSUBF + eo_orpSUBF + epo_eprpPP2SUBF + erpPP2SUBF + orpSUBF + epo_orpkinSUBF + eo_erpSUBF + eprpPP2SUBF + eprp_orpSUBF + epo_orpSUBF + erpSUBF + eo_erp_orpSUBF + erpSUBCSUBF + epo_eprpSUBF + eo_erpSUBCSUBF);

  // Reactions:
  ver: $e + $r -> er; kerf_factor*kerf*e*r - kerr*er;
  verp: $e + rp -> erp; kerf_factor*kerf*e*rp - kerpr*erp;
  vepr: ep + $r -> epr; kerf_factor*kerf*ep*r - kerr*epr;
  veprp: ep + rp -> eprp; kerf_factor*kerf*ep*rp - kerpr*eprp;
  veo_er_eo: eo + $r -> eo_er; kerf_factor*kerf*eo*r - kerr*eo_er;
  ver_or_or: $e + OR -> er_or; kerf_factor*kerf*e*OR - kerr*er_or;
  veo_erp_eo: eo + rp -> eo_erp; kerf_factor*kerf*eo*rp - kerpr*eo_erp;
  verp_orp_orp: $e + orp -> erp_orp; kerf_factor*kerf*e*orp - kerpr*erp_orp;
  vepo_epr_epo: epo + $r -> epo_epr; kerf_factor*kerf*epo*r - kerr*epo_epr;
  vepr_or_or: ep + OR -> epr_or; kerf_factor*kerf*ep*OR - kerr*epr_or;
  veprp_orp_orp: ep + orp -> eprp_orp; kerf_factor*kerf*ep*orp - kerpr*eprp_orp;
  vepo_eprp_epo: epo + rp -> epo_eprp; kerf_factor*kerf*epo*rp - kerpr*epo_eprp;
  veo_er_or_eoor: eo_or -> eo_er_or; kerf_factor*kerfp*eo_or - kerrd*eo_er_or;
  veo_ero_orp_eoorp: eo_orp -> eo_erp_orp; kerf_factor*kerfp*eo_orp - kerprd*eo_erp_orp;
  vepo_epr_or_epoor: epo_or -> epo_epr_or; kerf_factor*kerfp*epo_or - kerrd*epo_epr_or;
  vepo_eprp_orp_epoorp: epo_orp -> epo_eprp_orp; kerf_factor*kerfp*epo_orp - kerprd*epo_eprp_orp;
  veo: $e + $o -> eo; keof_factor*keof*e*o - keor*eo;
  vepo: ep + $o -> epo; keof_factor*keof*ep*o - kepor*epo;
  veo_or_or: $e + OR -> eo_or; keof_factor*keof*e*OR - keor*eo_or;
  veo_er_er: er + $o -> eo_er; keof_factor*keof*er*o - keor*eo_er;
  veo_orp_orp: $e + orp -> eo_orp; keof_factor*keof*e*orp - keor*eo_orp;
  vepo_or_or: ep + OR -> epo_or; keof_factor*keof*ep*OR - kepor*epo_or;
  veo_erp_erp: erp + $o -> eo_erp; keof_factor*keof*erp*o - keor*eo_erp;
  epo_epr_epr: epr + $o -> epo_epr; keof_factor*keof*epr*o - kepor*epo_epr;
  vepo_orp_orp: ep + orp -> epo_orp; keof_factor*keof*ep*orp - kepor*epo_orp;
  vepo_eprp_eprp: eprp + $o -> epo_eprp; keof_factor*keof*eprp*o - kepor*epo_eprp;
  veo_er_or_eror: er_or -> eo_er_or; keofp*er_or - keord*eo_er_or;
  veo_erp_orp_erporp: erp_orp -> eo_erp_orp; keofp*erp_orp - keord*eo_erp_orp;
  vepo_epr_or_epror: epr_or -> epo_epr_or; keofp*epr_or - kepord*epo_epr_or;
  vepo_eprp_orp_eprporp: eprp_orp -> epo_eprp_orp; keofp*eprp_orp - kepord*epo_eprp_orp;
  vor: $o + $r -> OR; korf_factor*korf*o*r - korr*OR;
  vorp: $o + rp -> orp; korf_factor*korf*o*rp - korpr*orp;
  veo_or_eo: eo + $r -> eo_or; korf_factor*korf*eo*r - korr*eo_or;
  ver_or_er: $o + er -> er_or; korf_factor*korf*o*er - korr*er_or;
  veo_orp_eo: eo + rp -> eo_orp; korf_factor*korf*eo*rp - korpr*eo_orp;
  verp_orp_erp: $o + erp -> erp_orp; korf_factor*korf*o*erp - korpr*erp_orp;
  vepo_or_epo: epo + $r -> epo_or; korf_factor*korf*epo*r - korr*epo_or;
  vepr_or_epr: $o + epr -> epr_or; korf_factor*korf*o*epr - korr*epr_or;
  vepo_orp_epo: epo + rp -> epo_orp; korf_factor*korf*epo*rp - korpr*epo_orp;
  veprp_orp_eprp: $o + eprp -> eprp_orp; korf_factor*korf*o*eprp - korpr*eprp_orp;
  veo_er_or_eoer: eo_er -> eo_er_or; korf_factor*korfp*eo_er - korrd*eo_er_or;
  veo_erp_orp_eoerp: eo_erp -> eo_erp_orp; korf_factor*korfp*eo_erp - korprd*eo_erp_orp;
  vepo_epr_or_epoepr: epo_epr -> epo_epr_or; korf_factor*korfp*epo_epr - korrd*epo_epr_or;
  vepo_eprp_orp_epoeprp: epo_eprp -> epo_eprp_orp; korf_factor*korfp*epo_eprp - korprd*epo_eprp_orp;
  veprp_orp_epror: epr_or => orp + ep; kcatrp_on*kcatrp*epr_or;
  veprp_epr: epr => rp + ep; kcatrp_on*kcatrp*epr;
  vekin_inact: $e + kin_inact -> ekin_inact; kkinb*e*kin_inact - kkinu*ekin_inact;
  vepkin_inact: ep + kin_inact -> epkin_inact; kkinb*ep*kin_inact - kkinu*epkin_inact;
  vkin_act: kin_inact -> $kin; (kkin_act_bg + kkin_act_egf*kkin_act_on)*kin_inact - kkin_inact*kin;
  vekin: $e + $kin -> ekin; kkinb*e*kin - kkinu*ekin;
  vepkin: ep + $kin -> epkin; kkinb*ep*kin - kkinu*epkin;
  vep_ekin: ekin => ep + $kin; kcatkin_on*kcatkin*ekin;
  vepp: $e + $PP -> ePP; kppb*e*PP - kppu*ePP;
  veppp: ep + $PP -> epPP; kppb*ep*PP - kppu*epPP;
  ve_eppp: epPP => $e + $PP; kcatpp_on*kcatpp*epPP;
  vrpPP2: rp + $PP2 -> rpPP2; kpp2b*rp*PP2 - kpp2u*rpPP2;
  vr_rpPP2: rpPP2 => $r + $PP2; kcatpp2*rpPP2;
  vr_PP2: $r + $PP2 -> rPP2; kpp2b*r*PP2 - kpp2u*rPP2;
  ver_PP2: er + $PP2 -> erPP2; kpp2b*er*PP2 - kpp2u*erPP2;
  ve_rPP2: $e + rPP2 -> erPP2; kerf*e*rPP2 - kerr*erPP2;
  vepr_PP2: epr + $PP2 -> eprPP2; kpp2b*epr*PP2 - kpp2u*eprPP2;
  vep_rPP2: ep + rPP2 -> eprPP2; kerf*ep*rPP2 - kerr*eprPP2;
  veo_er_PP2: eo_er + $PP2 -> eo_erPP2; kpp2b*eo_er*PP2 - kpp2u*eo_erPP2;
  veo_rPP2: eo + rPP2 -> eo_erPP2; kerf*eo*rPP2 - kerr*eo_erPP2;
  verPP2_o: erPP2 + $o -> eo_erPP2; keof*erPP2*o - keor*eo_erPP2;
  vepo_epr_PP2: epo_epr + $PP2 -> epo_eprPP2; kpp2b*epo_epr*PP2 - kpp2u*epo_eprPP2;
  vepo_rPP2: epo + rPP2 -> epo_eprPP2; kerf*epo*rPP2 - kerr*epo_eprPP2;
  veprPP2_o: eprPP2 + $o -> epo_eprPP2; keof*eprPP2*o - kepor*epo_eprPP2;
  verp_PP2: erp + $PP2 -> erpPP2; kpp2b*erp*PP2 - kpp2u*erpPP2;
  ve_rpPP2: $e + rpPP2 -> erpPP2; kerf*e*rpPP2 - kerpr*erpPP2;
  veprp_PP2: eprp + $PP2 -> eprpPP2; kpp2b*eprp*PP2 - kpp2u*eprpPP2;
  vep_rpPP2: ep + rpPP2 -> eprpPP2; kerf*ep*rpPP2 - kerpr*eprpPP2;
  veo_erp_PP2: eo_erp + $PP2 -> eo_erpPP2; kpp2b*eo_erp*PP2 - kpp2u*eo_erpPP2;
  veo_rpPP2: eo + rpPP2 -> eo_erpPP2; kerf*eo*rpPP2 - kerpr*eo_erpPP2;
  verpPP2_o: erpPP2 + $o -> eo_erpPP2; keof*erpPP2*o - keor*eo_erpPP2;
  vepo_eprp_PP2: epo_eprp + $PP2 -> epo_eprpPP2; kpp2b*epo_eprp*PP2 - kpp2u*epo_eprpPP2;
  vepo_rpPP2: epo + rpPP2 -> epo_eprpPP2; kerf*epo*rpPP2 - kerpr*epo_eprpPP2;
  veprpPP2_o: eprpPP2 + $o -> epo_eprpPP2; keof*eprpPP2*o - kepor*epo_eprpPP2;
  ver_PP2_cat: erpPP2 -> er + $PP2; kcatpp2*erpPP2;
  vepr_PP2_cat: eprpPP2 -> epr + $PP2; kcatpp2*eprpPP2;
  veo_er_PP2_cat: eo_erpPP2 -> eo_er + $PP2; kcatpp2*eo_erpPP2;
  vepo_er_PP2_cat: epo_eprpPP2 -> epo_er + $PP2; kcatpp2*epo_eprpPP2;
  veo_PP: eo + $PP -> eoPP; kppb*eo*PP - kppu*eoPP;
  vePP_o: ePP + $o -> eoPP; keof*ePP*o - keor*eoPP;
  vepo_PP: epo + $PP -> epoPP; kppb*epo*PP - kppu*epoPP;
  vepPP_o: epPP + $o -> epoPP; keof*epPP*o - kepor*epoPP;
  veo_or_PP: eo_or + $PP -> eo_orPP; kppb*eo_or*PP - kppu*eo_orPP;
  vePP_OR: ePP + OR -> eo_orPP; keof*ePP*OR - keor*eo_orPP;
  veoPP_r: eoPP + $r -> eo_orPP; korf*eoPP*r - korr*eo_orPP;
  vepo_or_PP: epo_or + $PP -> epo_orPP; kppb*epo_or*PP - kppu*epo_orPP;
  vepPP_OR: epPP + OR -> epo_orPP; keof*epPP*OR - kepor*epo_orPP;
  vepoPP_r: epoPP + $r -> epo_orPP; korf*epoPP*r - korr*epo_orPP;
  veo_orp_PP: eo_orp + $PP -> eo_orpPP; kppb*eo_orp*PP - kppu*eo_orpPP;
  vePP_orp: ePP + orp -> eo_orpPP; keof*ePP*orp - keor*eo_orpPP;
  veoPP_rp: eoPP + rp -> eo_orpPP; korf*eoPP*rp - korpr*eo_orpPP;
  vepo_orp_PP: epo_orp + $PP -> epo_orpPP; kppb*epo_orp*PP - kppu*epo_orpPP;
  vepPP_orp: epPP + orp -> epo_orpPP; keof*epPP*orp - kepor*epo_orpPP;
  vepoPP_rp: epoPP + rp -> epo_orpPP; korf*epoPP*rp - korpr*epo_orpPP;
  veo_kin: eo + $kin -> eokin; kkinb*eo*kin - kkinu*eokin;
  vekin_o: ekin + $o -> eokin; keof*ekin*o - keor*eokin;
  vepo_kin: epo + $kin -> epokin; kkinb*epo*kin - kkinu*epokin;
  vepkin_o: epkin + $o -> epokin; keof*epkin*o - kepor*epokin;
  veo_or_kin: eo_or + $kin -> eo_orkin; kkinb*eo_or*kin - kkinu*eo_orkin;
  vekin_OR: ekin + OR -> eo_orkin; keof*ekin*OR - keor*eo_orkin;
  veokin_r: eokin + $r -> eo_orkin; korf*eokin*r - korr*eo_orkin;
  vepo_or_kin: epo_or + $kin -> epo_orkin; kkinb*epo_or*kin - kkinu*epo_orkin;
  vepkin_OR: epkin + OR -> epo_orkin; keof*epkin*OR - kepor*epo_orkin;
  vepokin_r: epokin + $r -> epo_orkin; korf*epokin*r - korr*epo_orkin;
  veo_orp_kin: eo_orp + $kin -> eo_orpkin; kkinb*eo_orp*kin - kkinu*eo_orpkin;
  vekin_orp: ekin + orp -> eo_orpkin; keof*ekin*orp - keor*eo_orpkin;
  veokin_rp: eokin + rp -> eo_orpkin; korf*eokin*rp - korpr*eo_orpkin;
  vepo_orp_kin: epo_orp + $kin -> epo_orpkin; kkinb*epo_orp*kin - kkinu*epo_orpkin;
  vepkin_orp: epkin + orp -> epo_orpkin; keof*epkin*orp - kepor*epo_orpkin;
  vepokin_rp: epokin + rp -> epo_orpkin; korf*epokin*rp - korpr*epo_orpkin;
  veo_kin_inact: eo + kin_inact -> eokin_inact; kkinb*eo*kin_inact - kkinu*eokin_inact;
  vekin_inact_o: ekin_inact + $o -> eokin_inact; keof*ekin_inact*o - keor*eokin_inact;
  vepo_kin_inact: epo + kin_inact -> epokin_inact; kkinb*epo*kin_inact - kkinu*epokin_inact;
  vepkin_inact_o: epkin_inact + $o -> epokin_inact; keof*epkin_inact*o - kepor*epokin_inact;
  veo_or_kin_inact: eo_or + kin_inact -> eo_orkin_inact; kkinb*eo_or*kin_inact - kkinu*eo_orkin_inact;
  vekin_inact_OR: ekin_inact + OR -> eo_orkin_inact; keof*ekin_inact*OR - keor*eo_orkin_inact;
  veokin_inact_r: eokin_inact + $r -> eo_orkin_inact; korf*eokin_inact*r - korr*eo_orkin_inact;
  vepo_or_kin_inact: epo_or + kin_inact -> epo_orkin_inact; kkinb*epo_or*kin_inact - kkinu*epo_orkin_inact;
  vepkin_inact_OR: epkin_inact + OR -> epo_orkin_inact; keof*epkin_inact*OR - kepor*epo_orkin_inact;
  vepokin_inact_r: epokin_inact + $r -> epo_orkin_inact; korf*epokin_inact*r - korr*epo_orkin_inact;
  veo_orp_kin_inact: eo_orp + kin_inact -> eo_orpkin_inact; kkinb*eo_orp*kin_inact - kkinu*eo_orpkin_inact;
  vekin_inact_orp: ekin_inact + orp -> eo_orpkin_inact; keof*ekin_inact*orp - keor*eo_orpkin_inact;
  veokin_inact_rp: eokin_inact + rp -> eo_orpkin_inact; korf*eokin_inact*rp - korpr*eo_orpkin_inact;
  vepo_orp_kin_inact: epo_orp + kin_inact -> epo_orpkin_inact; kkinb*epo_orp*kin_inact - kkinu*epo_orpkin_inact;
  vepkin_inact_orp: epkin_inact + orp -> epo_orpkin_inact; keof*epkin_inact*orp - kepor*epo_orpkin_inact;
  vepokin_inact_rp: epokin_inact + rp -> epo_orpkin_inact; korf*epokin_inact*rp - korpr*epo_orpkin_inact;
  ve_rpSUBC__erpSUBC: $e + rpSUBC -> erpSUBC; kerf_factor*kerf*e*rpSUBC - kerpr*erpSUBC;
  vrpSUBC_ep__eprpSUBC: rpSUBC + ep -> eprpSUBC; kerf_factor*kerf*ep*rpSUBC - kerpr*eprpSUBC;
  veo_rpSUBC__eo_erpSUBC: eo + rpSUBC -> eo_erpSUBC; kerf_factor*kerf*eo*rpSUBC - kerpr*eo_erpSUBC;
  vrpSUBC_epo__epo_eprpSUBC: rpSUBC + epo -> epo_eprpSUBC; kerf_factor*kerf*epo*rpSUBC - kerpr*epo_eprpSUBC;
  vo_erpSUBC__eo_erpSUBC: $o + erpSUBC -> eo_erpSUBC; keof_factor*keof*erpSUBC*o - keor*eo_erpSUBC;
  vo_eprpSUBC__epo_eprpSUBC: $o + eprpSUBC -> epo_eprpSUBC; keof_factor*keof*eprpSUBC*o - kepor*epo_eprpSUBC;
  vrp_SUBC: rp + SUBC -> rpSUBC; kon_rpSUB*rp*SUBC - koff_rpSUB*rpSUBC;
  verp_SUBC: erp + SUBC -> erpSUBC; kon_rpSUB*erp*SUBC - koff_rpSUB*erpSUBC;
  veprp_SUBC: eprp + SUBC -> eprpSUBC; kon_rpSUB*eprp*SUBC - koff_rpSUB*eprpSUBC;
  veo_erp_SUBC: eo_erp + SUBC -> eo_erpSUBC; kon_rpSUB*eo_erp*SUBC - koff_rpSUB*eo_erpSUBC;
  vepo_eprp_SUBC: epo_eprp + SUBC -> epo_eprpSUBC; kon_rpSUB*epo_eprp*SUBC - koff_rpSUB*epo_eprpSUBC;
  veprp_pSUBC_cat: eprpSUBC -> eprp + pSUBC; kcatSUB*eprpSUBC;
  verp_pSUBC_cat: erpSUBC -> erp + pSUBC; kcatSUB*erpSUBC;
  vepo_eprp_pSUBC_cat: epo_eprpSUBC -> epo_eprp + pSUBC; kcatSUB*epo_eprpSUBC;
  vrp_pSUBC_cat: rpSUBC -> rp + pSUBC; kcatSUB*rpSUBC;
  veo_erp_pSUBC_cat: eo_erpSUBC -> eo_erp + pSUBC; kcatSUB*eo_erpSUBC;
  vSUBC_cat: pSUBC -> SUBC; kppSUB*pSUBC;
  ve_rpSUBF__erpSUBF: $e + rpSUBF -> erpSUBF; kerf_factor*kerf*e*rpSUBF - kerpr*erpSUBF;
  vrpSUBF_ep__eprpSUBF: rpSUBF + ep -> eprpSUBF; kerf_factor*kerf*ep*rpSUBF - kerpr*eprpSUBF;
  veo_rpSUBF__eo_erpSUBF: eo + rpSUBF -> eo_erpSUBF; kerf_factor*kerf*eo*rpSUBF - kerpr*eo_erpSUBF;
  ve_orpSUBF__erp_orpSUBF: $e + orpSUBF -> erp_orpSUBF; kerf_factor*kerf*e*orpSUBF - kerpr*erp_orpSUBF;
  vorpSUBF_ep__eprp_orpSUBF: orpSUBF + ep -> eprp_orpSUBF; kerf_factor*kerf*ep*orpSUBF - kerpr*eprp_orpSUBF;
  vrpSUBF_epo__epo_eprpSUBF: rpSUBF + epo -> epo_eprpSUBF; kerf_factor*kerf*epo*rpSUBF - kerpr*epo_eprpSUBF;
  ve_orpSUBF__eo_orpSUBF: $e + orpSUBF -> eo_orpSUBF; keof_factor*keof*e*orpSUBF - keor*eo_orpSUBF;
  vo_erpSUBF__eo_erpSUBF: $o + erpSUBF -> eo_erpSUBF; keof_factor*keof*erpSUBF*o - keor*eo_erpSUBF;
  vorpSUBF_ep__epo_orpSUBF: orpSUBF + ep -> epo_orpSUBF; keof_factor*keof*ep*orpSUBF - kepor*epo_orpSUBF;
  vo_eprpSUBF__epo_eprpSUBF: $o + eprpSUBF -> epo_eprpSUBF; keof_factor*keof*eprpSUBF*o - kepor*epo_eprpSUBF;
  vo_rpSUBF__orpSUBF: $o + rpSUBF -> orpSUBF; korf_factor*korf*o*rpSUBF - korpr*orpSUBF;
  veo_rpSUBF__eo_orpSUBF: eo + rpSUBF -> eo_orpSUBF; korf_factor*korf*eo*rpSUBF - korpr*eo_orpSUBF;
  vo_erpSUBF__erp_orpSUBF: $o + erpSUBF -> erp_orpSUBF; korf_factor*korf*o*erpSUBF - korpr*erp_orpSUBF;
  vrpSUBF_epo__epo_orpSUBF: rpSUBF + epo -> epo_orpSUBF; korf_factor*korf*epo*rpSUBF - korpr*epo_orpSUBF;
  vo_eprpSUBF__eprp_orpSUBF: $o + eprpSUBF -> eprp_orpSUBF; korf_factor*korf*o*eprpSUBF - korpr*eprp_orpSUBF;
  vrpSUBF_PP2__rpPP2SUBF: rpSUBF + $PP2 -> rpPP2SUBF; kpp2b*rpSUBF*PP2 - kpp2u*rpPP2SUBF;
  verpSUBF_PP2__erpPP2SUBF: erpSUBF + $PP2 -> erpPP2SUBF; kpp2b*erpSUBF*PP2 - kpp2u*erpPP2SUBF;
  ve_rpPP2SUBF__erpPP2SUBF: $e + rpPP2SUBF -> erpPP2SUBF; kerf*e*rpPP2SUBF - kerpr*erpPP2SUBF;
  veprpSUBF_PP2__eprpPP2SUBF: eprpSUBF + $PP2 -> eprpPP2SUBF; kpp2b*eprpSUBF*PP2 - kpp2u*eprpPP2SUBF;
  vep_rpPP2SUBF__eprpPP2SUBF: ep + rpPP2SUBF -> eprpPP2SUBF; kerf*ep*rpPP2SUBF - kerpr*eprpPP2SUBF;
  veo_erpSUBF_PP2__eo_erpPP2SUBF: eo_erpSUBF + $PP2 -> eo_erpPP2SUBF; kpp2b*eo_erpSUBF*PP2 - kpp2u*eo_erpPP2SUBF;
  veo_rpPP2SUBF__eo_erpPP2SUBF: eo + rpPP2SUBF -> eo_erpPP2SUBF; kerf*eo*rpPP2SUBF - kerpr*eo_erpPP2SUBF;
  vo_erpPP2SUBF__eo_erpPP2SUBF: $o + erpPP2SUBF -> eo_erpPP2SUBF; keof*erpPP2SUBF*o - keor*eo_erpPP2SUBF;
  vepo_eprpSUBF_PP2__epo_eprpPP2SUBF: epo_eprpSUBF + $PP2 -> epo_eprpPP2SUBF; kpp2b*epo_eprpSUBF*PP2 - kpp2u*epo_eprpPP2SUBF;
  vepo_rpPP2SUBF__epo_eprpPP2SUBF: epo + rpPP2SUBF -> epo_eprpPP2SUBF; kerf*epo*rpPP2SUBF - kerpr*epo_eprpPP2SUBF;
  vo_eprpPP2SUBF__epo_eprpPP2SUBF: $o + eprpPP2SUBF -> epo_eprpPP2SUBF; keof*eprpPP2SUBF*o - kepor*epo_eprpPP2SUBF;
  veo_orpSUBF_PP__eo_orpPPSUBF: eo_orpSUBF + $PP -> eo_orpPPSUBF; kppb*eo_orpSUBF*PP - kppu*eo_orpPPSUBF;
  vorpSUBF_ePP__eo_orpPPSUBF: orpSUBF + ePP -> eo_orpPPSUBF; keof*ePP*orpSUBF - keor*eo_orpPPSUBF;
  vrpSUBF_eoPP__eo_orpPPSUBF: rpSUBF + eoPP -> eo_orpPPSUBF; korf*eoPP*rpSUBF - korpr*eo_orpPPSUBF;
  vepo_orpSUBF_PP__epo_orpPPSUBF: epo_orpSUBF + $PP -> epo_orpPPSUBF; kppb*epo_orpSUBF*PP - kppu*epo_orpPPSUBF;
  vorpSUBF_epPP__epo_orpPPSUBF: orpSUBF + epPP -> epo_orpPPSUBF; keof*epPP*orpSUBF - kepor*epo_orpPPSUBF;
  vrpSUBF_epoPP__epo_orpPPSUBF: rpSUBF + epoPP -> epo_orpPPSUBF; korf*epoPP*rpSUBF - korpr*epo_orpPPSUBF;
  veo_orpSUBF_kin__eo_orpkinSUBF: eo_orpSUBF + $kin -> eo_orpkinSUBF; kkinb*eo_orpSUBF*kin - kkinu*eo_orpkin;
  vorpSUBF_ekin__eo_orpkinSUBF: orpSUBF + ekin -> eo_orpkinSUBF; keof*ekin*orpSUBF - keor*eo_orpkin;
  vrpSUBF_eokin__eo_orpkinSUBF: rpSUBF + eokin -> eo_orpkinSUBF; korf*eokin*rpSUBF - korpr*eo_orpkin;
  vepo_orpSUBF_kin__epo_orpkinSUBF: epo_orpSUBF + $kin -> epo_orpkinSUBF; kkinb*epo_orpSUBF*kin - kkinu*epo_orpkin;
  vorpSUBF_epkin__epo_orpkinSUBF: orpSUBF + epkin -> epo_orpkinSUBF; keof*epkin*orpSUBF - kepor*epo_orpkin;
  vrpSUBF_epokin__epo_orpkinSUBF: rpSUBF + epokin -> epo_orpkinSUBF; korf*epokin*rpSUBF - korpr*epo_orpkin;
  veo_orpSUBF_kin_inact__eo_orpkin_inactSUBF: eo_orpSUBF + kin_inact -> eo_orpkin_inactSUBF; kkinb*eo_orpSUBF*kin_inact - kkinu*eo_orpkin_inact;
  vorpSUBF_ekin_inact__eo_orpkin_inactSUBF: orpSUBF + ekin_inact -> eo_orpkin_inactSUBF; keof*ekin_inact*orpSUBF - keor*eo_orpkin_inact;
  vrpSUBF_eokin_inact__eo_orpkin_inactSUBF: rpSUBF + eokin_inact -> eo_orpkin_inactSUBF; korf*eokin_inact*rpSUBF - korpr*eo_orpkin_inact;
  vepo_orpSUBF_kin_inact__epo_orpkin_inactSUBF: epo_orpSUBF + kin_inact -> epo_orpkin_inactSUBF; kkinb*epo_orpSUBF*kin_inact - kkinu*epo_orpkin_inact;
  vorpSUBF_epkin_inact__epo_orpkin_inactSUBF: orpSUBF + epkin_inact -> epo_orpkin_inactSUBF; keof*epkin_inact*orpSUBF - kepor*epo_orpkin_inact;
  vrpSUBF_epokin_inact__epo_orpkin_inactSUBF: rpSUBF + epokin_inact -> epo_orpkin_inactSUBF; korf*epokin_inact*rpSUBF - korpr*epo_orpkin_inact;
  ve_rpSUBCSUBF__erpSUBCSUBF: $e + rpSUBCSUBF -> erpSUBCSUBF; kerf_factor*kerf*e*rpSUBCSUBF - kerpr*erpSUBCSUBF;
  vep_rpSUBCSUBF__eprpSUBCSUBF: ep + rpSUBCSUBF -> eprpSUBCSUBF; kerf_factor*kerf*ep*rpSUBCSUBF - kerpr*eprpSUBCSUBF;
  veo_rpSUBCSUBF__eo_erpSUBCSUBF: eo + rpSUBCSUBF -> eo_erpSUBCSUBF; kerf_factor*kerf*eo*rpSUBCSUBF - kerpr*eo_erpSUBCSUBF;
  vepo_rpSUBCSUBF__epo_eprpSUBCSUBF: epo + rpSUBCSUBF -> epo_eprpSUBCSUBF; kerf_factor*kerf*epo*rpSUBCSUBF - kerpr*epo_eprpSUBCSUBF;
  vo_erpSUBCSUBF__eo_erpSUBCSUBF: $o + erpSUBCSUBF -> eo_erpSUBCSUBF; keof_factor*keof*erpSUBCSUBF*o - keor*eo_erpSUBCSUBF;
  vo_eprpSUBCSUBF__epo_eprpSUBCSUBF: $o + eprpSUBCSUBF -> epo_eprpSUBCSUBF; keof_factor*keof*eprpSUBCSUBF*o - kepor*epo_eprpSUBCSUBF;
  vrpSUBF_SUBC__rpSUBCSUBF: rpSUBF + SUBC -> rpSUBCSUBF; kon_rpSUB*rpSUBF*SUBC - koff_rpSUB*rpSUBCSUBF;
  verpSUBF_SUBC__erpSUBCSUBF: erpSUBF + SUBC -> erpSUBCSUBF; kon_rpSUB*erpSUBF*SUBC - koff_rpSUB*erpSUBCSUBF;
  veprpSUBF_SUBC__eprpSUBCSUBF: eprpSUBF + SUBC -> eprpSUBCSUBF; kon_rpSUB*eprpSUBF*SUBC - koff_rpSUB*eprpSUBCSUBF;
  veo_erpSUBF_SUBC__eo_erpSUBCSUBF: eo_erpSUBF + SUBC -> eo_erpSUBCSUBF; kon_rpSUB*eo_erpSUBF*SUBC - koff_rpSUB*eo_erpSUBCSUBF;
  vepo_eprpSUBF_SUBC__epo_eprpSUBCSUBF: epo_eprpSUBF + SUBC -> epo_eprpSUBCSUBF; kon_rpSUB*epo_eprpSUBF*SUBC - koff_rpSUB*epo_eprpSUBCSUBF;
  vrp_SUBF: rp + SUBF -> rpSUBF; kon_rpSUB*rp*SUBF - koff_rpSUB*rpSUBF;
  verp_SUBF: erp + SUBF -> erpSUBF; kon_rpSUB*erp*SUBF - koff_rpSUB*erpSUBF;
  veprp_SUBF: eprp + SUBF -> eprpSUBF; kon_rpSUB*eprp*SUBF - koff_rpSUB*eprpSUBF;
  vorp_SUBF: orp + SUBF -> orpSUBF; kon_rpSUB*orp*SUBF - koff_rpSUB*orpSUBF;
  vepo_orp_SUBF: epo_orp + SUBF -> epo_orpSUBF; kon_rpSUB*epo_orp*SUBF - koff_rpSUB*epo_orpSUBF;
  veo_orp_SUBF: eo_orp + SUBF -> eo_orpSUBF; kon_rpSUB*eo_orp*SUBF - koff_rpSUB*eo_orpSUBF;
  veo_erp_SUBF: eo_erp + SUBF -> eo_erpSUBF; kon_rpSUB*eo_erp*SUBF - koff_rpSUB*eo_erpSUBF;
  vepo_eprp_SUBF: epo_eprp + SUBF -> epo_eprpSUBF; kon_rpSUB*epo_eprp*SUBF - koff_rpSUB*epo_eprpSUBF;
  verp_orp_SUBF: erp_orp + SUBF -> erp_orpSUBF; kon_rpSUB*erp_orp*SUBF - koff_rpSUB*erp_orpSUBF;
  veprp_orp_SUBF: eprp_orp + SUBF -> eprp_orpSUBF; kon_rpSUB*eprp_orp*SUBF - koff_rpSUB*eprp_orpSUBF;
  veo_erp_orp_SUBF: eo_erp_orp + SUBF -> eo_erp_orpSUBF; kon_rpSUB*eo_erp_orp*SUBF - koff_rpSUB*eo_erp_orpSUBF;
  vepo_eprp_orp_SUBF: epo_eprp_orp + SUBF -> epo_eprp_orpSUBF; kon_rpSUB*epo_eprp_orp*SUBF - koff_rpSUB*epo_eprp_orpSUBF;
  vrpPP2_SUBF: rpPP2 + SUBF -> rpPP2SUBF; kon_rpSUB*rpPP2*SUBF - koff_rpSUB*rpPP2SUBF;
  vepo_eprpPP2_SUBF: epo_eprpPP2 + SUBF -> epo_eprpPP2SUBF; kon_rpSUB*epo_eprpPP2*SUBF - koff_rpSUB*epo_eprpPP2SUBF;
  verpPP2_SUBF: erpPP2 + SUBF -> erpPP2SUBF; kon_rpSUB*erpPP2*SUBF - koff_rpSUB*erpPP2SUBF;
  veo_erpPP2_SUBF: eo_erpPP2 + SUBF -> eo_erpPP2SUBF; kon_rpSUB*eo_erpPP2*SUBF - koff_rpSUB*eo_erpPP2SUBF;
  veprpPP2_SUBF: eprpPP2 + SUBF -> eprpPP2SUBF; kon_rpSUB*eprpPP2*SUBF - koff_rpSUB*eprpPP2SUBF;
  vepo_orpPP_SUBF: epo_orpPP + SUBF -> epo_orpPPSUBF; kon_rpSUB*epo_orpPP*SUBF - koff_rpSUB*epo_orpPPSUBF;
  veo_orpPP_SUBF: eo_orpPP + SUBF -> eo_orpPPSUBF; kon_rpSUB*eo_orpPP*SUBF - koff_rpSUB*eo_orpPPSUBF;
  veo_orpkin_inact_SUBF: eo_orpkin_inact + SUBF -> eo_orpkin_inactSUBF; kon_rpSUB*eo_orpkin_inact*SUBF - koff_rpSUB*eo_orpkin_inactSUBF;
  vepo_orpkin_SUBF: epo_orpkin + SUBF -> epo_orpkinSUBF; kon_rpSUB*epo_orpkin*SUBF - koff_rpSUB*epo_orpkinSUBF;
  veo_orpkin_SUBF: eo_orpkin + SUBF -> eo_orpkinSUBF; kon_rpSUB*eo_orpkin*SUBF - koff_rpSUB*eo_orpkinSUBF;
  vepo_orpkin_inact_SUBF: epo_orpkin_inact + SUBF -> epo_orpkin_inactSUBF; kon_rpSUB*epo_orpkin_inact*SUBF - koff_rpSUB*epo_orpkin_inactSUBF;
  veprpSUBC_SUBF: eprpSUBC + SUBF -> eprpSUBCSUBF; kon_rpSUB*eprpSUBC*SUBF - koff_rpSUB*eprpSUBCSUBF;
  verpSUBC_SUBF: erpSUBC + SUBF -> erpSUBCSUBF; kon_rpSUB*erpSUBC*SUBF - koff_rpSUB*erpSUBCSUBF;
  vepo_eprpSUBC_SUBF: epo_eprpSUBC + SUBF -> epo_eprpSUBCSUBF; kon_rpSUB*epo_eprpSUBC*SUBF - koff_rpSUB*epo_eprpSUBCSUBF;
  vrpSUBC_SUBF: rpSUBC + SUBF -> rpSUBCSUBF; kon_rpSUB*rpSUBC*SUBF - koff_rpSUB*rpSUBCSUBF;
  veo_erpSUBC_SUBF: eo_erpSUBC + SUBF -> eo_erpSUBCSUBF; kon_rpSUB*eo_erpSUBC*SUBF - koff_rpSUB*eo_erpSUBCSUBF;
  veprpSUBC_pSUBF_cat: eprpSUBCSUBF -> eprpSUBC + pSUBF; kcatSUB*eprpSUBCSUBF;
  veo_erpPP2_pSUBF_cat: eo_erpPP2SUBF -> eo_erpPP2 + pSUBF; kcatSUB*eo_erpPP2SUBF;
  veo_orpPP_pSUBF_cat: eo_orpPPSUBF -> eo_orpPP + pSUBF; kcatSUB*eo_orpPPSUBF;
  veo_orpkin_pSUBF_cat: eo_orpkinSUBF -> eo_orpkin + pSUBF; kcatSUB*eo_orpkinSUBF;
  vepo_eprp_orp_pSUBF_cat: epo_eprp_orpSUBF -> epo_eprp_orp + pSUBF; kcatSUB*epo_eprp_orpSUBF;
  vrpSUBC_pSUBF_cat: rpSUBCSUBF -> rpSUBC + pSUBF; kcatSUB*rpSUBCSUBF;
  vepo_orpPP_pSUBF_cat: epo_orpPPSUBF -> epo_orpPP + pSUBF; kcatSUB*epo_orpPPSUBF;
  vepo_eprpSUBC_pSUBF_cat: epo_eprpSUBCSUBF -> epo_eprpSUBC + pSUBF; kcatSUB*epo_eprpSUBCSUBF;
  vrp_pSUBF_cat: rpSUBF -> rp + pSUBF; kcatSUB*rpSUBF;
  verp_orp_pSUBF_cat: erp_orpSUBF -> erp_orp + pSUBF; kcatSUB*erp_orpSUBF;
  vrpPP2_pSUBF_cat: rpPP2SUBF -> rpPP2 + pSUBF; kcatSUB*rpPP2SUBF;
  vepo_orpkin_inact_pSUBF_cat: epo_orpkin_inactSUBF -> epo_orpkin_inact + pSUBF; kcatSUB*epo_orpkin_inactSUBF;
  veo_orpkin_inact_pSUBF_cat: eo_orpkin_inactSUBF -> eo_orpkin_inact + pSUBF; kcatSUB*eo_orpkin_inactSUBF;
  veprp_pSUBF_cat: eprpSUBF -> eprp + pSUBF; kcatSUB*eprpSUBF;
  veo_orp_pSUBF_cat: eo_orpSUBF -> eo_orp + pSUBF; kcatSUB*eo_orpSUBF;
  vepo_eprpPP2_pSUBF_cat: epo_eprpPP2SUBF -> epo_eprpPP2 + pSUBF; kcatSUB*epo_eprpPP2SUBF;
  verpPP2_pSUBF_cat: erpPP2SUBF -> erpPP2 + pSUBF; kcatSUB*erpPP2SUBF;
  vorp_pSUBF_cat: orpSUBF -> orp + pSUBF; kcatSUB*orpSUBF;
  vepo_orpkin_pSUBF_cat: epo_orpkinSUBF -> epo_orpkin + pSUBF; kcatSUB*epo_orpkinSUBF;
  veo_erp_pSUBF_cat: eo_erpSUBF -> eo_erp + pSUBF; kcatSUB*eo_erpSUBF;
  veprpPP2_pSUBF_cat: eprpPP2SUBF -> eprpPP2 + pSUBF; kcatSUB*eprpPP2SUBF;
  veprp_orp_pSUBF_cat: eprp_orpSUBF -> eprp_orp + pSUBF; kcatSUB*eprp_orpSUBF;
  vepo_orp_pSUBF_cat: epo_orpSUBF -> epo_orp + pSUBF; kcatSUB*epo_orpSUBF;
  verp_pSUBF_cat: erpSUBF -> erp + pSUBF; kcatSUB*erpSUBF;
  veo_erp_orp_pSUBF_cat: eo_erp_orpSUBF -> eo_erp_orp + pSUBF; kcatSUB*eo_erp_orpSUBF;
  verpSUBC_pSUBF_cat: erpSUBCSUBF -> erpSUBC + pSUBF; kcatSUB*erpSUBCSUBF;
  vepo_eprp_pSUBF_cat: epo_eprpSUBF -> epo_eprp + pSUBF; kcatSUB*epo_eprpSUBF;
  veo_erpSUBC_pSUBF_cat: eo_erpSUBCSUBF -> eo_erpSUBC + pSUBF; kcatSUB*eo_erpSUBCSUBF;
  vSUBF_cat: pSUBF -> SUBF; kppSUB*pSUBF;
end
